*Heading
** Job name: PP01_RadialSprings_Kr650 Model name: PP01_RadialSprings
** Generated by: Abaqus/CAE 2021
**Preprint, echo=NO, model=NO, history=NO, contact=NO
**
** PARTS
**
*Part, name=PART-1
*Node
      1, -0.098240003,           0., 0.0279190093
      2,           0., -0.098240003,   0.02771038
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*Element, type=S4R
   1,    1,    3,   81,   80
   2,    3,    4,  100,   81
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*Elset, elset=ALL_ELES, generate
    1,  1440,     1
*Nset, nset=_PICKEDSET3, internal
 1086, 1088, 1089, 1090, 1091, 1092
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** Section: Section-1-ALL_ELES
*Shell General Section, elset=ALL_ELES, material=STEEL
0.0015,
*End Part
**
**
** ASSEMBLY
**
*Assembly, name=Assembly
**
*Instance, name=PART-1-1, part=PART-1
*End Instance
**
*Nset, nset=ALL, instance=PART-1-1, generate
    1,  1481,     1
*Nset, nset=SET-2, instance=PART-1-1
 1086, 1088, 1089, 1090, 1091, 1092
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*Orientation, name="PART-1-1-Datum csys-1", system=CYLINDRICAL
          0.,           0.,          0.1,           0.,           0.,          1.1
1, 0.
*Spring, elset=Springs/Dashpots-1-spring, orientation="PART-1-1-Datum csys-1"
1
650000.
*Element, type=Spring1, elset=Springs/Dashpots-1-spring
1, PART-1-1.1086
2, PART-1-1.1088
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*End Assembly
**
** MATERIALS
**
**   ---- *MATERIAL ------------------------------------
*Material, name=STEEL
*Density
5120.,
*Elastic
 9.6e+10, 0.3
*Expansion, zero=70.
 6.3e-06,
**
** BOUNDARY CONDITIONS
**
** Name: Disp-BC-1 Type: Displacement/Rotation
*Boundary
SET-2, 3, 3
** Name: Disp-BC-2 Type: Displacement/Rotation
*Boundary
SET-2, 4, 4
** Name: Disp-BC-3 Type: Displacement/Rotation
*Boundary
SET-2, 5, 5
** Name: Disp-BC-4 Type: Displacement/Rotation
*Boundary
SET-2, 6, 6
** ----------------------------------------------------------------
**
