*Heading
** Job name: main_job Model name: beam_model
** Generated by: Abaqus/CAE 2018
*Preprint, echo=NO, model=NO, history=NO, contact=NO
**
** PARTS
**
*Part, name=beam_part
*Node
      1,           0.,           0.,           0.
      2, 0.00249999994,           0.,           0.
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*Element, type=B32
  1,   1, 122,   2
  2,   2, 123,   3
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*Nset, nset=_PickedSet2, internal, generate
   1,  241,    1
*Elset, elset=_PickedSet2, internal, generate
   1,  120,    1
** Section: beam_section  Profile: rect_profile
*Beam Section, elset=_PickedSet2, material=steel, temperature=GRADIENTS, section=RECT
0.025, 0.001
0.,0.,-1.
*End Part
**
**
** ASSEMBLY
**
*Assembly, name=Assembly
**
*Instance, name=beam_part-1, part=beam_part
*End Instance
**
*Nset, nset=left_node, instance=beam_part-1
 1,
*Nset, nset=right_node, instance=beam_part-1
 121,
*End Assembly
**
** MATERIALS
**
*Material, name=steel
*Density
7800.,
*Elastic
 2.05e+11, 0.3
**
** BOUNDARY CONDITIONS
**
** Name: BC-1 Type: Symmetry/Antisymmetry/Encastre
*Boundary
left_node, ENCASTRE
** Name: BC-2 Type: Symmetry/Antisymmetry/Encastre
*Boundary
right_node, ENCASTRE
