*Heading
** Job name: mems_arch Model name: Model-1
** Generated by: Abaqus/CAE 2024
*Preprint, echo=NO, model=NO, history=NO, contact=NO
**
** PARTS
**
*Part, name=Arch
*Node
      1,  0.265000015, 0.00248724665,           0.
      2,   0.26550436, 0.0074617425,           0.
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*Element, type=C3D15
   1,   933,   240,   988,  1982,  1289,  2037,  8395,  8394,  8393,  8396,  8397,  8398,  8400,  8399,  8401
   2,   918,   288,   988,  1967,  1337,  2037,  8404,  8403,  8402,  8405,  8406,  8407,  8409,  8408,  8401
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*Nset, nset=Set-1, generate
     1,  35255,      1
*Elset, elset=Set-1, generate
    1,  9744,     1
** Section: arch section
*Solid Section, elset=Set-1, material=Silicon
,
*End Part
**
**
** ASSEMBLY
**
*Assembly, name=Assembly
**
*Instance, name=Arch-1, part=Arch
*End Instance
**
*Nset, nset=Set-1, instance=Arch-1
     1,     2,    60,    61,   121,   122
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*Elset, elset=Set-1, instance=Arch-1
  508,  599,  701,  790, 1377, 1379
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*End Assembly
**
** MATERIALS
**
*Material, name=Silicon
*Density
 0.00233,
*Elastic
 1.67e+11, 0.22
**
** BOUNDARY CONDITIONS
**
** Name: BC-1 Type: Displacement/Rotation
*Boundary
Set-1, 1, 1
Set-1, 2, 2
Set-1, 3, 3
Set-1, 4, 4
Set-1, 5, 5
Set-1, 6, 6
