*Heading
** Job name: Job-1 Model name: Model-1
** Generated by: Abaqus/CAE 2024
*Preprint, echo=NO, model=NO, history=NO, contact=NO
**
** PARTS
**
*Part, name=Part-1
*Node
      1, 0.0200017318, 0.00451689446, 0.0320000015
      2, 0.0400031991, 0.00462617446, 0.0320000015
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*Element, type=C3D15
  1,  33,  66,  98, 163, 196, 228, 263, 262, 261, 264, 265, 266, 268, 267, 269
  2,  98,  99,  35, 228, 229, 165, 272, 271, 270, 273, 274, 275, 269, 276, 277
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*Nset, nset=Set-1, generate
   1,  904,    1
*Elset, elset=Set-1, generate
   1,  128,    1
** Section: Section-1
*Solid Section, elset=Set-1, material=Material-1
,
*End Part
**
**
** ASSEMBLY
**
*Assembly, name=Assembly
**
*Instance, name=Part-1-1, part=Part-1
*End Instance
**
*Nset, nset=Set-1, instance=Part-1-1
  32,  33,  34,  66, 162, 163, 164, 196, 263, 264, 267, 268, 576, 774, 777, 778
*Elset, elset=Set-1, instance=Part-1-1
  1, 65
*End Assembly
**
** MATERIALS
**
*Material, name=Material-1
*Density
 0.00232,
*Elastic
 1.6e+11, 0.22
**
** BOUNDARY CONDITIONS
**
** Name: BC-1 Type: Displacement/Rotation
*Boundary
Set-1, 1, 1
Set-1, 2, 2
Set-1, 3, 3
Set-1, 4, 4
Set-1, 5, 5
Set-1, 6, 6
** ----------------------------------------------------------------
