*Heading
** Job name: JH_beam Model name: Model-1
** Generated by: Abaqus/CAE 2024
*Preprint, echo=NO, model=NO, history=NO, contact=NO
**
** PARTS
**
*Part, name=Part-1
*Node
      1, -0.228599995,           0.,           0.
      2, -0.222884998,           0.,           0.
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*Element, type=B31
 1,  1,  2
 2,  2,  3
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*Nset, nset=Set-1, generate
  1,  41,   1
*Elset, elset=Set-1, generate
  1,  40,   1
*Nset, nset=Set-2, generate
  1,  41,   1
*Elset, elset=Set-2, generate
  1,  40,   1
** Section: Section-1  Profile: Profile-1
*Beam Section, elset=Set-1, material=steel, temperature=GRADIENTS, section=RECT
0.0127, 0.000787
0.,0.,-1.
*End Part
**
**
** ASSEMBLY
**
*Assembly, name=Assembly
**
*Instance, name=Part-1-1, part=Part-1
*End Instance
**
*Nset, nset=Set-1, instance=Part-1-1
  1, 41
*End Assembly
**
** MATERIALS
**
*Material, name=steel
*Density
7870.,
*Elastic
 2.048e+11, 0.28
**
** BOUNDARY CONDITIONS
**
** Name: BC-1 Type: Displacement/Rotation
*Boundary
Set-1, 1, 1
Set-1, 2, 2
Set-1, 3, 3
Set-1, 4, 4
Set-1, 5, 5
Set-1, 6, 6
