*Heading
** Job name: Job-1 Model name: Model-1
** Generated by: Abaqus/CAE 2024
*Preprint, echo=NO, model=NO, history=NO, contact=NO
**
** PARTS
**
*Part, name=cantilever
*Node
      1,           0.,           0.,           0.
      2, 0.00249999994,           0.,           0.
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*Element, type=B32
  1,   1, 122,   2
  2,   2, 123,   3
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*Nset, nset=Set-1, generate
   1,  241,    1
*Elset, elset=Set-1, generate
   1,  120,    1
*Nset, nset=Set-2, generate
   1,  241,    1
*Elset, elset=Set-2, generate
   1,  120,    1
** Section: Section-1  Profile: Profile-1
*Beam Section, elset=Set-1, material=steel, temperature=GRADIENTS, section=RECT
0.025, 0.001
0.,0.,-1.
*End Part
**
**
** ASSEMBLY
**
*Assembly, name=Assembly
**
*Instance, name=cantilever-1, part=cantilever
*End Instance
**
*Nset, nset=Set-2, instance=cantilever-1
 1,
**
*Spring, elset=Springs/Dashpots-1-spring
2
STIFFNESS_HERE
*Element, type=Spring1, elset=Springs/Dashpots-1-spring
1, cantilever-1.121
**
*Spring, elset=Springs/Dashpots-2-spring
6
STIFFNESS_HERE
*Element, type=Spring1, elset=Springs/Dashpots-2-spring
2, cantilever-1.121
**
*Spring, elset=Springs/Dashpots-3-spring
1
STIFFNESS_HERE
*Element, type=Spring1, elset=Springs/Dashpots-3-spring
3, cantilever-1.121
*End Assembly
**
** MATERIALS
**
*Material, name=steel
*Density
7800.,
*Elastic
 2.05e+11, 0.3
**
** BOUNDARY CONDITIONS
**
** Name: BC-1 Type: Displacement/Rotation
*Boundary
Set-2, 1, 1
Set-2, 2, 2
Set-2, 3, 3
Set-2, 4, 4
Set-2, 5, 5
Set-2, 6, 6
** ----------------------------------------------------------------
