** ----------------------------------------------------------------
**
**Restart, read, step = STEP_HERE, inc = INC_HERE
*Step, name=Dynamic, nlgeom=YES, inc= INC_HERE
*Dynamic
DYNAMIC_SETTINGS_HERE
**0.1,1.1,1.2e-05
*CLOAD, OP=NEW
**DYNAMIC_LOAD_HERE
**
** OUTPUT REQUESTS
*NODE PRINT,SUMMARY=NO
U
*NODE PRINT,SUMMARY=NO
V
*ENERGY PRINT
**
**Restart, write, frequency = INC_HERE
*End Step
** ----------------------------------------------------------------
